*Heading
 stauchen
** Job name: Job_sx-px Model name: Model-1
** Generated by: Abaqus/CAE 6.9-1
*Preprint, echo=NO, model=NO, history=NO, contact=NO
** ----------------------------------------------------------------
**
** PART INSTANCE: Part-sx
**
*Node
      1,   4.79746485,    1.4086628,           0.
      2,   4.20626783,   2.70320415,           0.
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*Element, type=C3D8
  1,  82, 125,  88,  83,  17,  60,  23,  18
  2,  80, 124, 126,  81,  15,  59,  61,  16
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*Nset, nset=Part-sx__PickedSet5, generate
   1,  780,    1
*Elset, elset=Part-sx__PickedSet5, generate
   1,  583,    1
** Section: Section-sx
*Solid Section, elset=Part-sx__PickedSet5, material=Material-sx
,
** ----------------------------------------------------------------
**
** PART INSTANCE: Part-px
**
*System
         21.,          0.,          0.,         22.,          0.,          0.
*Node
    781,   4.79746485,    1.4086628,           0.
    782,   4.20626783,   2.70320415,           0.
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*Element, type=C3D8
 584,  862,  905,  868,  863,  797,  840,  803,  798
 585,  860,  904,  906,  861,  795,  839,  841,  796
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*Nset, nset=Part-px__PickedSet4, generate
 781, 1560,    1
*Elset, elset=Part-px__PickedSet4, generate
 584, 1166,    1
** Section: Section-px
*Solid Section, elset=Part-px__PickedSet4, material=Material-px
,
*System
*Nset, nset=_PickedSet12, generate
 716,  780,    1
*Nset, nset=_PickedSet12, generate
1496, 1560,    1
*Elset, elset=_PickedSet12, generate
 531,  583,    1
*Elset, elset=_PickedSet12, generate
1114, 1166,    1
*Nset, nset=_PickedSet13, generate
  1,  65,   1
*Nset, nset=_PickedSet13, generate
781, 845,   1
*Elset, elset=_PickedSet13, generate
  1,  53,   1
*Elset, elset=_PickedSet13, generate
584, 636,   1
**
** MATERIALS
**
*Material, name=Material-px
*Depvar
     49,
*User Material, constants=2, unsymm
2.,2.
*Material, name=Material-sx
*Depvar
     49,
*User Material, constants=2, unsymm
1.,1.
**
** BOUNDARY CONDITIONS
**
** Name: unten Type: Displacement/Rotation
*Boundary
_PickedSet13, 1, 1
_PickedSet13, 2, 2
_PickedSet13, 3, 3
_PickedSet13, 4, 4
_PickedSet13, 5, 5
_PickedSet13, 6, 6
** ----------------------------------------------------------------
**
** STEP: Step-1
**
*Step, name=Step-1, nlgeom=YES, inc=10000
drücken
*Static
0.01, 10., 0.0001, 1.
**
** BOUNDARY CONDITIONS
**
** Name: oben Type: Displacement/Rotation
*Boundary
_PickedSet12, 1, 1
_PickedSet12, 2, 2
_PickedSet12, 3, 3, -7.5
_PickedSet12, 4, 4
_PickedSet12, 5, 5
_PickedSet12, 6, 6
**
** OUTPUT REQUESTS
**
*Restart, write, frequency=0
**
** FIELD OUTPUT: F-Output-1
**
*Output, field, variable=PRESELECT
**
** HISTORY OUTPUT: H-Output-1
**
*Output, history, variable=PRESELECT
*End Step
